**Calculix Data File Generated from OpenVSP 3.30.0
**Num_Els: 192
**Num_Tris: 0
**Num_Quads: 192
**Num_Beams 0

**Skin
*NODE, NSET=NSkin
1,0.000556,0.249708,0.016131
2,0.100316,0.252020,0.003497
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
**Rib0
*NODE, NSET=NRib0

**Rib1
*NODE, NSET=NRib1

**Rib2
*NODE, NSET=NRib2

**Rib3
*NODE, NSET=NRib3

**Rib4
*NODE, NSET=NRib4

**Rib5
*NODE, NSET=NRib5

*ELEMENT, TYPE=S8, ELSET=ESkin_0
1,1,2,3,4,5,6,7,8
2,9,10,3,2,11,12,6,13
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
*ELEMENT, TYPE=S8, ELSET=ESkin_1
97,297,298,299,300,301,302,303,304
98,14,305,299,298,306,307,302,308
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
*ELEMENT, TYPE=S8, ELSET=ERib0_0

*ELEMENT, TYPE=S8, ELSET=ERib0_1

*ELEMENT, TYPE=S8, ELSET=ERib1_0

*ELEMENT, TYPE=S8, ELSET=ERib1_1

*ELEMENT, TYPE=S8, ELSET=ERib2_0

*ELEMENT, TYPE=S8, ELSET=ERib2_1

*ELEMENT, TYPE=S8, ELSET=ERib3_0

*ELEMENT, TYPE=S8, ELSET=ERib3_1

*ELEMENT, TYPE=S8, ELSET=ERib4_0

*ELEMENT, TYPE=S8, ELSET=ERib4_1

*ELEMENT, TYPE=S8, ELSET=ERib5_0

*ELEMENT, TYPE=S8, ELSET=ERib5_1


*SHELL SECTION, ELSET=ESkin_0, MATERIAL=Aluminum 7075-T6, ORIENTATION=OSkin_0
0.03048

*ORIENTATION, NAME=OSkin_0, SYSTEM=RECTANGULAR
0.003648,0.994522,0.104465,0.0,0.0,1.0

*SHELL SECTION, ELSET=ESkin_1, MATERIAL=Aluminum 7075-T6, ORIENTATION=OSkin_1
0.03048

*ORIENTATION, NAME=OSkin_1, SYSTEM=RECTANGULAR
0.003648,-0.994522,0.104465,0.0,0.0,1.0

*SHELL SECTION, ELSET=ERib0_0, MATERIAL=Aluminum 7075-T6, ORIENTATION=ORib0_0
0.03048

*ORIENTATION, NAME=ORib0_0, SYSTEM=RECTANGULAR
0.999391,0.000000,-0.034899,0.0,0.0,1.0

*SHELL SECTION, ELSET=ERib0_1, MATERIAL=Aluminum 7075-T6, ORIENTATION=ORib0_1
0.03048

*ORIENTATION, NAME=ORib0_1, SYSTEM=RECTANGULAR
0.999391,0.000000,-0.034899,0.0,0.0,1.0

*SHELL SECTION, ELSET=ERib1_0, MATERIAL=Aluminum 7075-T6, ORIENTATION=ORib1_0
0.03048

*SHELL SECTION, ELSET=ERib1_1, MATERIAL=Aluminum 7075-T6, ORIENTATION=ORib1_1
0.03048

*SHELL SECTION, ELSET=ERib2_0, MATERIAL=Aluminum 7075-T6, ORIENTATION=ORib2_0
0.03048

*SHELL SECTION, ELSET=ERib2_1, MATERIAL=Aluminum 7075-T6, ORIENTATION=ORib2_1
0.03048

*SHELL SECTION, ELSET=ERib3_0, MATERIAL=Aluminum 7075-T6, ORIENTATION=ORib3_0
0.03048

*SHELL SECTION, ELSET=ERib3_1, MATERIAL=Aluminum 7075-T6, ORIENTATION=ORib3_1
0.03048

*SHELL SECTION, ELSET=ERib4_0, MATERIAL=Aluminum 7075-T6, ORIENTATION=ORib4_0
0.03048

*SHELL SECTION, ELSET=ERib4_1, MATERIAL=Aluminum 7075-T6, ORIENTATION=ORib4_1
0.03048

*SHELL SECTION, ELSET=ERib5_0, MATERIAL=Aluminum 7075-T6, ORIENTATION=ORib5_0
0.03048

*SHELL SECTION, ELSET=ERib5_1, MATERIAL=Aluminum 7075-T6, ORIENTATION=ORib5_1
0.03048

**Materials
*MATERIAL, NAME=Aluminum 7075-T6
*DENSITY
2810
*ELASTIC, TYPE=ISO
7.17e+10, 0.33
*EXPANSION, TYPE=ISO
2.36e-05
