**Calculix Data File Generated from OpenVSP 3.30.0
**Num_Els: 1197
**Num_Tris: 1197
**Num_Quads: 0
**Num_Beams 0

**Skin
*NODE, NSET=NSkin
3,8.495719,0.991692,2.761846
4,7.632318,2.764986,2.798756
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
**RibArray0
*NODE, NSET=NRibArray0

*ELEMENT, TYPE=S3, ELSET=ESkin_0
1,1,2,3
2,1,4,5
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
*ELEMENT, TYPE=S3, ELSET=ESkin_1

*ELEMENT, TYPE=S3, ELSET=ERibArray0_0
1125,70,71,400
1126,71,80,258
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
*ELEMENT, TYPE=S3, ELSET=ERibArray0_1
1140,274,86,84
1141,84,97,265
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
*ELEMENT, TYPE=S3, ELSET=ERibArray0_2
1155,276,92,89
1156,89,88,268
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
*ELEMENT, TYPE=S3, ELSET=ERibArray0_3
1170,464,145,141
1171,141,144,267
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
*ELEMENT, TYPE=S3, ELSET=ERibArray0_4
1184,340,116,150
1185,150,159,333
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
*ELEMENT, TYPE=S3, ELSET=ERibArray0_5

*ELEMENT, TYPE=S3, ELSET=ERibArray0_6

*ELEMENT, TYPE=S3, ELSET=ERibArray0_7

*ELEMENT, TYPE=S3, ELSET=ERibArray0_8

*ELEMENT, TYPE=S3, ELSET=ERibArray0_9

**Intersections
*NODE, NSET=Nintersections
1,7.844020,1.842072,2.768476
2,8.532190,1.841115,2.795883
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

*SHELL SECTION, ELSET=ESkin_0, MATERIAL=Aluminum 7075-T6, ORIENTATION=OSkin_0
0.1

*ORIENTATION, NAME=OSkin_0, SYSTEM=RECTANGULAR
-0.018961,0.999194,0.035384,0.0,0.0,1.0

*SHELL SECTION, ELSET=ESkin_1, MATERIAL=Aluminum 7075-T6, ORIENTATION=OSkin_1
0.1

*SHELL SECTION, ELSET=ERibArray0_0, MATERIAL=Aluminum 7075-T6, ORIENTATION=ORibArray0_0
0.1

*ORIENTATION, NAME=ORibArray0_0, SYSTEM=RECTANGULAR
1.000000,0.000000,0.000000,0.0,0.0,1.0

*SHELL SECTION, ELSET=ERibArray0_1, MATERIAL=Aluminum 7075-T6, ORIENTATION=ORibArray0_1
0.1

*ORIENTATION, NAME=ORibArray0_1, SYSTEM=RECTANGULAR
1.000000,0.000000,0.000000,0.0,0.0,1.0

*SHELL SECTION, ELSET=ERibArray0_2, MATERIAL=Aluminum 7075-T6, ORIENTATION=ORibArray0_2
0.1

*ORIENTATION, NAME=ORibArray0_2, SYSTEM=RECTANGULAR
1.000000,0.000000,0.000000,0.0,0.0,1.0

*SHELL SECTION, ELSET=ERibArray0_3, MATERIAL=Aluminum 7075-T6, ORIENTATION=ORibArray0_3
0.1

*ORIENTATION, NAME=ORibArray0_3, SYSTEM=RECTANGULAR
1.000000,0.000000,0.000000,0.0,0.0,1.0

*SHELL SECTION, ELSET=ERibArray0_4, MATERIAL=Aluminum 7075-T6, ORIENTATION=ORibArray0_4
0.1

*ORIENTATION, NAME=ORibArray0_4, SYSTEM=RECTANGULAR
1.000000,0.000000,0.000000,0.0,0.0,1.0

*SHELL SECTION, ELSET=ERibArray0_5, MATERIAL=Aluminum 7075-T6, ORIENTATION=ORibArray0_5
0.1

*SHELL SECTION, ELSET=ERibArray0_6, MATERIAL=Aluminum 7075-T6, ORIENTATION=ORibArray0_6
0.1

*SHELL SECTION, ELSET=ERibArray0_7, MATERIAL=Aluminum 7075-T6, ORIENTATION=ORibArray0_7
0.1

*SHELL SECTION, ELSET=ERibArray0_8, MATERIAL=Aluminum 7075-T6, ORIENTATION=ORibArray0_8
0.1

*SHELL SECTION, ELSET=ERibArray0_9, MATERIAL=Aluminum 7075-T6, ORIENTATION=ORibArray0_9
0.1

**Materials
*MATERIAL, NAME=Aluminum 7075-T6
*DENSITY
5.4523
*ELASTIC, TYPE=ISO
1.49749e+09, 0.33
*EXPANSION, TYPE=ISO
1.31111e-05
