OpenVSP model (file version 5), 1 components.
Geometry view with OpenVSP parameter names; values to 6 digits, angles in degrees, lengths in the model's unit.
Overall bounding box: X_Min=-0.0857163 X_Len=0.161825 Y_Min=-1.50019 Y_Len=3.00039 Z_Min=-0.132522 Z_Len=0.265043

Propeller "PropGeom"
  location (X Y Z) 0 0 0, rotation 0 0 0
  bounding box size 0.161825 3.00039 0.265043
  Design: Diameter=3 NumBlade=2 Beta34=30 UseBeta34Flag=0 Feather=0 Rotate=0 Precone=0 ReverseFlag=0 FoldAngle=0 PropMode=0 AF=156 CLi=0.204029 Chord=0.2 Solidity=0.127324 ConstructXoC=0.25 FeatherAxisXoC=0.5 FeatherOffsetXoC=0
  cross sections:
    n  RadiusFrac  shape
    0  0.0211281   NACA 4-series Camber=0.0142268 CamberLoc=0.2 Chord=0.3 ThickChord=0.203704
    1  0.177767    airfoil file "DAE-51 AIRFOIL"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 BaseThickChord=0.0937965 Chord=0.3 ThickChord=0.102657
    2  1           airfoil file "DAE-51 AIRFOIL"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 BaseThickChord=0.0937965 Chord=0.3 ThickChord=0.0938
  Chord along r/R (cubic Bezier): 0.0211281: 0.2, 0.0974187: 0.2, 0.173709: 0.2, 0.25: 0.2, 0.330271: 0.2, 0.410542: 0.2, 0.490814: 0.2, 0.577209: 0.2, 0.663605: 0.2, 0.75: 0.2, 0.833333: 0.2, 0.916667: 0.2, 1: 0.2
  Twist along r/R (cubic Bezier): 0.0211281: 30, 0.0974187: 30, 0.173709: 30.72, 0.25: 30, 0.324497: 29.2969, 0.398994: 30, 0.473491: 30, 0.565661: 30, 0.65783: 30, 0.75: 30, 0.833333: 30, 0.916667: 30, 1: 30
  Skew along r/R (cubic Bezier): 0.0211281: 5.09259e-06, 0.347419: 5.09259e-06, 0.673709: 0, 1: 0
  Sweep along r/R (cubic Bezier): 0.0211281: -0.0152778, 0.347419: 0, 0.673709: 0, 1: -0.0865741
  Thick along r/R (cubic Bezier): 0.0211281: 0.203704, 0.113044: 0.0938, 0.204959: 0.0938, 0.296875: 0.0938, 0.53125: 0.0938, 0.765625: 0.0938, 1: 0.0938
  CLI along r/R (cubic Bezier): 0.0211281: 0.218981, 0.191169: 0.198858, 0.361209: 0.208551, 0.53125: 0.203882, 0.6875: 0.199213, 0.84375: 0.208859, 1: 0.203704
