OpenVSP model (file version 5), 10 components.
Geometry view with OpenVSP parameter names; values to 6 digits, angles in degrees, lengths in the model's unit.
Overall bounding box: X_Min=-2.17792 X_Len=6.51399 Y_Min=-16.7996 Y_Len=33.5993 Z_Min=-1.7 Z_Len=2.99797

Wing "WingGeom"
  location (X Y Z) -0.33 0 0.05, rotation 0 0 0
  symmetric about XZ
  bounding box size 0.877438 33.5993 1.29712
  mass: Density=0.5 Shell_Flag=1 Mass_Area=0.5 Mass_Prior=0
  totals: TotalSpan=33.75 TotalProjectedSpan=33.5912 TotalChord=0.7664 TotalArea=25.44 TotalAR=44.3541
  root: chord 0.88, twist 4.39, airfoil file "MagiDeCiel_1.dat"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 BaseThickChord=0.102826 ThickChord=0.102826
  sections:
    n  Span   Root_Chord  Tip_Chord  Area     Sweep  Sweep_Location  Dihedral  Twist  Twist_Location  tip airfoil
    1  1.875  0.88        0.88       1.65     0      0.25            0         4.39   0.25            as above
    2  3.75   0.88        0.843      3.23062  0      0.25            0.6       4.39   0.25            airfoil file "MagiDeCiel_2.dat"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 BaseThickChord=0.103438 ThickChord=0.103438
    3  3.75   0.843       0.77       3.02438  0      0.25            2.3       4.39   0.25            airfoil file "MagiDeCiel_3.dat"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 BaseThickChord=0.105405 ThickChord=0.105405
    4  3.75   0.77        0.685      2.72813  0      0.25            5.8       4.39   0.25            airfoil file "MagiDeCiel_4.dat"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 BaseThickChord=0.110982 ThickChord=0.110982
    5  3.75   0.685       0.428      2.08688  0      0.25            10        3.24   0.25            airfoil file "MagiDeCiel_5.dat"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 BaseThickChord=0.118088 ThickChord=0.118088

Wing "WingGeom"
  location (X Y Z) 3.6 0 -0.3, rotation 0 0 0
  symmetric about XZ
  bounding box size 0.7 3.3502 0.0700406
  mass: Density=0.5 Shell_Flag=1 Mass_Area=0.5 Mass_Prior=0
  totals: TotalSpan=3 TotalProjectedSpan=3 TotalChord=0.7 TotalArea=2.1 TotalAR=4.28571
  root: chord 0.7, twist 0, NACA 4-series Camber=0 CamberLoc=0.2 ThickChord=0.1
  sections:
    n  Span  Root_Chord  Tip_Chord  Area  Sweep  Sweep_Location  Dihedral  Twist  Twist_Location  tip airfoil
    1  1.5   0.7         0.7        1.05  0      0               0         0      0.25            as above

Wing "WingGeom"
  location (X Y Z) 3.43607 0 0, rotation 90 0 0
  bounding box size 0.9 0.0900522 1.29797
  mass: Density=0.5 Shell_Flag=1 Mass_Area=0.5 Mass_Prior=0
  totals: TotalSpan=1.2 TotalProjectedSpan=1.2 TotalChord=0.65 TotalArea=0.78 TotalAR=1.84615
  root: chord 0.9, twist 0, NACA 4-series Camber=0 CamberLoc=0.2 ThickChord=0.1
  sections:
    n  Span  Root_Chord  Tip_Chord  Area  Sweep  Sweep_Location  Dihedral  Twist  Twist_Location  tip airfoil
    1  1.2   0.9         0.4        0.78  0      0.35            0         0      0.25            as above

Propeller "PropGeom"
  location (X Y Z) -2.13115 0 -0.1, rotation 0 0 0
  bounding box size 0.112937 3.00005 0.23446
  Design: Diameter=3 NumBlade=2 Beta34=26.9698 UseBeta34Flag=0 Feather=0 Rotate=0 Precone=0 ReverseFlag=0 FoldAngle=0 PropMode=0 AF=65.0179 CLi=0.204034 Chord=0.095 Solidity=0.0604789 ConstructXoC=0.25 FeatherAxisXoC=0.5 FeatherOffsetXoC=0
  cross sections:
    n  RadiusFrac  shape
    0  0.0625      NACA 4-series Camber=0.0142268 CamberLoc=0.2 Chord=0.075 ThickChord=0.203704
    1  0.177767    CST airfoil Chord=0.111231 ContLERad=1 LowDegree=7 ThickChord=0.0800468 UpDegree=7 Au=[0.106056 0.308827 -0.11476 0.66488 -0.316684 0.598815 -0.0205017 0.239428] Al=[-0.106056 0.0561647 -0.117448 -0.0188798 0.168315 -0.215246 0.199691 -0.0359664]
    2  1           CST airfoil Chord=0.03 ContLERad=1 LowDegree=7 ThickChord=0.128877 UpDegree=7 Au=[0.171027 0.498016 -0.185063 1.07219 -0.510687 0.965651 -0.0330611 0.386103] Al=[-0.171027 0.0905715 -0.189398 -0.0304456 0.271426 -0.347106 0.322023 -0.0579995]
  Chord along r/R (cubic Bezier): 0.0625: 0.05, 0.375: 0.115, 0.6875: 0.195, 1: 0.02
  Twist along r/R (cubic Bezier): 0.0625: 76.582, 0.375: 27.309, 0.6875: 33.542, 1: 17.28
  Skew along r/R (cubic Bezier): 0.0625: 5.09259e-06, 0.375: 5.09259e-06, 0.6875: 0, 1: 0
  Sweep along r/R (cubic Bezier): 0.0625: -0.0152778, 0.375: 0, 0.6875: 0, 1: -0.0865741
  Thick along r/R (cubic Bezier): 0.0625: 0.203704, 0.140625: 0.131329, 0.21875: 0.0824029, 0.296875: 0.0755995, 0.375: 0.0687962, 0.453125: 0.0901247, 0.53125: 0.0925309, 0.6875: 0.0973432, 0.84375: 0.108938, 1: 0.127315
  CLI along r/R (cubic Bezier): 0.0625: 0.218981, 0.21875: 0.198858, 0.375: 0.208551, 0.53125: 0.203882, 0.6875: 0.199213, 0.84375: 0.208859, 1: 0.203704

Stack "StackGeom"
  location (X Y Z) -1.95652 0 -1.3, rotation 0 0 0
  bounding box size 2.72492 0.640767 0.915602
  mass: Density=0.3 Shell_Flag=1 Mass_Area=1 Mass_Prior=0
  cross sections:
    n  XDelta    YDelta  ZDelta     shape
    0  0         0       0          point
    1  0.672131  0       0.0819672  ellipse Ellipse_Height=0.608108 Ellipse_Width=0.450665
    2  0.770492  0       0.0819672  ellipse Ellipse_Height=0.810811 Ellipse_Width=0.62802
    3  0.508197  0       0.07       ellipse Ellipse_Height=0.85 Ellipse_Width=0.63
    4  0.554098  0       0.05       ellipse Ellipse_Height=0.63 Ellipse_Width=0.216216
    5  0.22      0       0.24       point

Fuselage "FuselageGeom"
  location (X Y Z) -1.7 0 -0.1, rotation 0 0 0
  bounding box size 6 0.1 0.1
  mass: Density=1 Shell_Flag=1 Mass_Area=1 Mass_Prior=0
  Design: Length=6
  cross sections:
    n  XLocPercent  YLocPercent  ZLocPercent  shape
    0  0            0            0            circle Circle_Diameter=0.1
    1  1            0            0            as above

Stack "StackGeom"
  location (X Y Z) 0.409836 0 -0.1, rotation 0 90 0
  bounding box size 0.05 0.05 1.6
  mass: Density=1 Shell_Flag=1 Mass_Area=1 Mass_Prior=0
  cross sections:
    n  XDelta  YDelta  ZDelta  shape
    0  0       0       0       circle Circle_Diameter=0.05
    1  1.6     0       0       as above

Stack "StackGeom"
  location (X Y Z) -0.901639 0 -0.1, rotation 0 90 0
  bounding box size 0.05 0.05 1.6
  mass: Density=1 Shell_Flag=1 Mass_Area=1 Mass_Prior=0
  cross sections:
    n  XDelta  YDelta  ZDelta  shape
    0  0       0       0       circle Circle_Diameter=0.05
    1  1.6     0       0       as above

Human "HumanGeom"
  location (X Y Z) -0.2 0 -1.15, rotation 0 70 0
  mass: Density=2417.77 Shell_Flag=0 Mass_Area=1 Mass_Prior=0 PointMass=55 CGx=0 CGy=0 CGz=0 Ixx=0 Iyy=0 Izz=0 Ixy=0 Ixz=0 Iyz=0
  Anthropometric: Age=30 AutoDensity=0 BMI=16 BMI_pct=0.05 GenderFlag=0 LenUnit=2 Mass=55 MassUnit=3 SitFrac=0.51 Stature=1.65 Stature_pct=0.0763458 Volume=0.0423123

Blank "BlankGeom"
  location (X Y Z) -2 0 -0.1, rotation 0 0 0
  mass: Density=1 Shell_Flag=0 Mass_Area=1 Mass_Prior=0 PointMass=2 CGx=0 CGy=0 CGz=0 Ixx=0 Iyy=0 Izz=0 Ixy=0 Ixz=0 Iyz=0

VSPAERO settings: Sref=25.44 bref=33.75 cref=0.7664 Xcg=0.0864788 Ycg=0 Zcg=-0.423901 AlphaStart=0 AlphaEnd=10 AlphaNpts=3 BetaStart=0 BetaEnd=0 BetaNpts=1 MachStart=0 MachEnd=0 MachNpts=1 ReCref=1e+07 Vinf=100 Rho=0.002377
