OpenVSP model (file version 5), 4 components.
Geometry view with OpenVSP parameter names; values to 6 digits, angles in degrees, lengths in the model's unit.
Overall bounding box: X_Min=-0.425421 X_Len=0.840394 Y_Min=-0.649086 Y_Len=1.29817 Z_Min=-0.0306364 Z_Len=0.181175

Stack "StackGeom"
  location (X Y Z) 0 0 0, rotation 0 0 -90
  symmetric about XZ
  bounding box size 0.785421 0.12 0.109396
  mass: Density=1 Shell_Flag=1 Mass_Area=1 Mass_Prior=0
  cross sections:
    n  XDelta  YDelta  ZDelta  shape
    0  0       0       0       edit curve Width=3 Height=2.5 AbsoluteFlag=0 SymType=0 cubic Bezier points (X Y): 0.12 0.011473, 0.119542 -0.0179604, 0.113805 -0.0107328, -0.00401789 -0.0112501, -0.0861615 -0.0112501, -0.0218752 -0.013393, -0.121876 -0.0112501, -0.157591 -0.000535719, -0.153608 0.0620094, -0.00182623 0.0103312, 0.0759763 0.0105035, 0.0684543 0.011473, 0.12 0.011473
    1  0.06    0       0       as above

Wing "WingGeom"
  location (X Y Z) -0.12 0 0.015, rotation 0 5.478 0
  symmetric about XZ
  bounding box size 0.534993 1.29817 0.173551
  mass: Density=1 Shell_Flag=1 Mass_Area=0.8 Mass_Prior=0
  totals: TotalSpan=1.55 TotalProjectedSpan=1.28997 TotalChord=0.230063 TotalArea=0.401971 TotalAR=4.13963
  root: chord 0.39, twist 0, NACA 4-series Camber=0 CamberLoc=0.2 ThickChord=0.1
  sections:
    n  Span   Root_Chord  Tip_Chord  Area       Sweep   Sweep_Location  Dihedral  Twist   Twist_Location  tip airfoil
    1  0.151  0.39        0.39       0.05889    0       0               0         0       0.25            as above
    2  0.454  0.39        0.149      0.122353   33.758  0               1.72727   -8.312  0.25            as above
    3  0.02   0.149       0.149      0.00298    40      0               45        -7.815  0.25            NACA 4-series Camber=0 CamberLoc=0.2 ThickChord=0.05
    4  0.15   0.149       0.0745     0.0167625  40      0               80        0       0.25            NACA 4-series Camber=0 CamberLoc=0.2 ThickChord=0.1
  SS_Control "SS_CONT_0": UStart=0.2 UEnd=0.395 Length_C_Start=0.102564 Length_C_End=0.258183 Length_Start=0.04 Length_End=0.04 LE_Flag=0 Surf_Type=2

Propeller "PropGeom"
  location (X Y Z) 0.4 0 0.05, rotation 0 0 0
  bounding box size 0 0.15 0.15
  mass: Density=1 Shell_Flag=1 Mass_Area=1 Mass_Prior=0
  Design: Diameter=0.15 NumBlade=3 Beta34=20 UseBeta34Flag=1 Feather=0 Rotate=0 Precone=0 ReverseFlag=0 FoldAngle=0 PropMode=2 AF=151.538 CLi=0.538798 Chord=0.177656 Solidity=0.169649 ConstructXoC=0.5 FeatherAxisXoC=0.5 FeatherOffsetXoC=0
  cross sections:
    n  RadiusFrac  shape
    0  0.2         ellipse Ellipse_Height=0.003 Ellipse_Width=0.006
    1  0.4         NACA 16-series Chord=0.0124688 IdealCl=0.7 ThickChord=0.144074
    2  1           NACA 16-series Chord=0.00975 IdealCl=0.2 ThickChord=0.03
  Chord along r/R (cubic Bezier): 0.2: 0.08, 0.333333: 0.15, 0.466667: 0.2, 0.6: 0.2, 0.716667: 0.2, 0.833333: 0.2, 0.95: 0.2, 0.966667: 0.2, 0.983333: 0.2, 1: 0.13
  Twist along r/R (PCHIP): 0.2: 46.75, 0.75: 20, 1: 13
  Thick along r/R (cubic Bezier): 0.2: 0.5, 0.233333: 0.3, 0.266667: 0.225, 0.3: 0.2, 0.4: 0.125, 0.5: 0.115, 0.6: 0.1, 0.733333: 0.075, 0.866667: 0.055, 1: 0.03
  CLI along r/R (cubic Bezier): 0.2: 0, 0.266667: 0.7, 0.333333: 0.7, 0.4: 0.7, 0.466667: 0.7, 0.533333: 0.7, 0.6: 0.7, 0.733333: 0.7, 0.866667: 0.7, 1: 0.2

Blank "BlankGeom"
  location (X Y Z) -0.25 0 0, rotation 0 0 0
  mass: Density=1 Shell_Flag=0 Mass_Area=1 Mass_Prior=0 PointMass=0.2 CGx=0 CGy=0 CGz=0 Ixx=0 Iyy=0 Izz=0 Ixy=0 Ixz=0 Iyz=0

Parameter links (A drives B)
  WingGeom:XSec_1:Root_Chord -> WingGeom:XSec_2:Root_Chord Offset=0
  WingGeom:XSec_1:Root_Chord -> WingGeom:XSec_1:Tip_Chord Offset=0
  WingGeom:XSec_0:Camber -> WingGeom:XSec_1:Camber Offset=0
  WingGeom:XSec_3:Root_Chord -> WingGeom:XSec_3:Tip_Chord
  WingGeom:XSec_4:Root_Chord -> WingGeom:XSec_4:Tip_Chord Scale=0.5
  WingGeom:XSec_2:ThickChord -> WingGeom:XSec_3:ThickChord Scale=0.5
  WingGeom:XSec_2:Tip_Chord -> WingGeom:XSec_3:Root_Chord

VSPAERO settings: Sref=0.40255 bref=1.612 cref=0.211875 Xcg=0 Ycg=0 Zcg=0 AlphaStart=0 AlphaEnd=10 AlphaNpts=3 BetaStart=0 BetaEnd=0 BetaNpts=1 MachStart=0 MachEnd=0 MachNpts=1 ReCref=1e+07 Vinf=100 Rho=0.002377
