OpenVSP model (file version 5), 2 components.
Geometry view with OpenVSP parameter names; values to 6 digits, angles in degrees, lengths in the model's unit.
Overall bounding box: X_Min=-0.2 X_Len=1 Y_Min=-1.53794 Y_Len=3.07588 Z_Min=-0.122588 Z_Len=0.245176

Propeller "PropGeom"
  location (X Y Z) 0 0 0, rotation 0 0 0
  bounding box size 0.165037 3.07588 0.245176
  Design: Diameter=3 NumBlade=2 Beta34=28.4781 UseBeta34Flag=0 Feather=-2.362 Rotate=0 Precone=0 ReverseFlag=0 FoldAngle=0 PropMode=0 AF=57.2376 CLi=0.203881 Chord=0.103092 Solidity=0.0656304 ConstructXoC=0.25 FeatherAxisXoC=0.5 FeatherOffsetXoC=0
  cross sections:
    n  RadiusFrac  shape
    0  0.0706697   NACA 4-series Camber=0.0142268 CamberLoc=0.2 Chord=0.0840278 ThickChord=0.203704
    1  0.177767    CST airfoil Chord=0.154921 ContLERad=1 LowDegree=7 ThickChord=0.0800468 UpDegree=7 Au=[0.106056 0.308827 -0.11476 0.66488 -0.316684 0.598815 -0.0205017 0.239428] Al=[-0.106056 0.0561647 -0.117448 -0.0188798 0.168315 -0.215246 0.199691 -0.0359664]
    2  1           CST airfoil Chord=0.03 ContLERad=1 LowDegree=7 ThickChord=0.128877 UpDegree=7 Au=[0.171027 0.498016 -0.185063 1.07219 -0.510687 0.965651 -0.0330611 0.386103] Al=[-0.171027 0.0905715 -0.189398 -0.0304456 0.271426 -0.347106 0.322023 -0.0579995]
  Chord along r/R (cubic Bezier): 0.0706697: 0.0560185, 0.224196: 0.14, 0.377723: 0.15, 0.53125: 0.14, 0.6875: 0.11, 0.84375: 0.07, 1: 0.02
  Twist along r/R (cubic Bezier): 0.0706697: 87, 0.224196: 62, 0.377723: 50, 0.53125: 40, 0.6875: 33, 0.84375: 25.9521, 1: 25.463
  Skew along r/R (cubic Bezier): 0.0706697: 5.09259e-06, 0.380446: 5.09259e-06, 0.690223: 0, 1: 0
  Sweep along r/R (cubic Bezier): 0.0706697: -0.0152778, 0.380446: 0, 0.690223: 0, 1: -0.0865741
  Thick along r/R (cubic Bezier): 0.0706697: 0.203704, 0.146071: 0.131329, 0.221473: 0.0824029, 0.296875: 0.0755995, 0.375: 0.0687962, 0.453125: 0.0901247, 0.53125: 0.0925309, 0.6875: 0.0973432, 0.84375: 0.108938, 1: 0.127315
  CLI along r/R (cubic Bezier): 0.0706697: 0.218981, 0.226116: 0.19861, 0.381562: 0.208794, 0.537008: 0.203704, 0.691339: 0.198613, 0.845669: 0.208796, 1: 0.203704

Fuselage "FuselageGeom", child of "PropGeom"
  location (X Y Z) -0.2 0 0, rotation 0 0 0
  bounding box size 1 0.1 0.1
  Design: Length=1
  cross sections:
    n  XLocPercent  YLocPercent  ZLocPercent  shape
    0  0            0            0            point
    1  0.25         0            0            circle Circle_Diameter=0.1
    2  0.5          0            0            as above
    3  1            0            0            as above
