OpenVSP model (file version 5), 2 components.
Geometry view with OpenVSP parameter names; values to 6 digits, angles in degrees, lengths in the model's unit.
Overall bounding box: X_Min=-0.00012587 X_Len=5.99556 Y_Min=-11.6301 Y_Len=23.2603 Z_Min=-2.27187 Z_Len=2.42527

Wing "WingGeom"
  location (X Y Z) 0 0 0, rotation 0 2.737 0
  symmetric about XZ
  bounding box size 3.99556 23.2603 0.425269
  totals: TotalSpan=20.0584 TotalProjectedSpan=20.0584 TotalChord=4 TotalArea=80.2336 TotalAR=5.0146
  root: chord 4, twist 0, NACA 4-series Camber=0 CamberLoc=0.2 ThickChord=0.1
  sections:
    n  Span     Root_Chord  Tip_Chord  Area     Sweep  Sweep_Location  Dihedral  Twist  Twist_Location  tip airfoil
    1  2        4           4          8        0      0               0         0      0.25            as above
    2  2        4           4          8        0      0               0         0      0.25            as above
    3  2.02921  4           4          8.11682  0      0               0         0      0.25            as above
    4  2        4           4          8        0      0               0         0      0.25            as above
    5  2        4           4          8        0      0               0         0      0.25            as above

Wing "WingGeom"
  location (X Y Z) 2 0 -2, rotation 0 2.737 0
  symmetric about XZ
  bounding box size 3.99556 19.2603 0.425269
  totals: TotalSpan=16.0584 TotalProjectedSpan=16.0584 TotalChord=4 TotalArea=64.2336 TotalAR=4.0146
  root: chord 4, twist 0, NACA 4-series Camber=0 CamberLoc=0.2 ThickChord=0.1
  sections:
    n  Span     Root_Chord  Tip_Chord  Area     Sweep  Sweep_Location  Dihedral  Twist  Twist_Location  tip airfoil
    1  2        4           4          8        0      0               0         0      0.25            as above
    2  2        4           4          8        0      0               0         0      0.25            as above
    3  2.02921  4           4          8.11682  0      0               0         0      0.25            as above
    4  2        4           4          8        0      0               0         0      0.25            as above

VSPAERO settings: Sref=80 bref=20 cref=4 Xcg=0 Ycg=0 Zcg=0 AlphaStart=0 AlphaEnd=10 AlphaNpts=3 BetaStart=0 BetaEnd=0 BetaNpts=1 MachStart=0 MachEnd=0 MachNpts=1 ReCref=1e+07 Vinf=100 Rho=0.002377
