** Calculix structure data file generated from OpenVSP 3.35.3
** WingGeom_Struct0
** Num_Nodes:       746
** Num_Els:         1626
** Num_Tris:        1626
** Num_Quads:       0
** Num_Beams:       0
** Node_Offset:     0
** Element_Offset:  0

** Skin WingGeom_Struct0
*NODE, NSET=NSkin_WingGeom_Struct0
1,3.438651,0.503595,-0.224863
2,3.181525,0.000000,-0.237677
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
** RibArray0 WingGeom_Struct0
*NODE, NSET=NRibArray0_WingGeom_Struct0
737,1.769274,1.002921,-0.084578
738,1.334829,1.002921,-0.063817
739,1.334496,3.008762,-0.063904
740,1.769209,3.008762,-0.084597
741,1.769288,5.014603,-0.084582
742,1.334870,5.014603,-0.063815
743,1.772682,9.026285,-0.084746
744,1.340322,9.026285,-0.064066

** Spar1 WingGeom_Struct0
*NODE, NSET=NSpar1_WingGeom_Struct0
745,1.997718,9.851364,-0.095503
746,1.997718,2.504378,-0.095503

** Intersections WingGeom_Struct0
*NODE, NSET=Nintersections_WingGeom_Struct0
4,0.422885,1.002921,-0.180676
6,0.185709,1.002921,-0.125427
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
** Skin WingGeom_Struct0
*ELEMENT, TYPE=S3, ELSET=ESkin_WingGeom_Struct0_0
2,1,2,3
3,4,5,6
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
*ELEMENT, TYPE=S3, ELSET=ESkin_WingGeom_Struct0_1

** RibArray0 WingGeom_Struct0
*ELEMENT, TYPE=S3, ELSET=ERibArray0_WingGeom_Struct0_0
1450,6,28,90
1451,124,99,53
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
*ELEMENT, TYPE=S3, ELSET=ERibArray0_WingGeom_Struct0_1
1474,211,157,152
1475,248,213,192
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
*ELEMENT, TYPE=S3, ELSET=ERibArray0_WingGeom_Struct0_2
1498,375,341,311
1499,274,281,365
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
*ELEMENT, TYPE=S3, ELSET=ERibArray0_WingGeom_Struct0_3
1522,475,418,396
1523,418,456,416
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
*ELEMENT, TYPE=S3, ELSET=ERibArray0_WingGeom_Struct0_4
1542,596,548,523
1543,548,610,552
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
*ELEMENT, TYPE=S3, ELSET=ERibArray0_WingGeom_Struct0_5

*ELEMENT, TYPE=S3, ELSET=ERibArray0_WingGeom_Struct0_6

*ELEMENT, TYPE=S3, ELSET=ERibArray0_WingGeom_Struct0_7

*ELEMENT, TYPE=S3, ELSET=ERibArray0_WingGeom_Struct0_8

*ELEMENT, TYPE=S3, ELSET=ERibArray0_WingGeom_Struct0_9

** Spar1 WingGeom_Struct0
*ELEMENT, TYPE=S3, ELSET=ESpar1_WingGeom_Struct0_0
1566,745,632,574
1567,313,322,374
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
*ELEMENT, TYPE=S3, ELSET=ESpar1_WingGeom_Struct0_1

** Properties WingGeom_Struct0

*SHELL SECTION, ELSET=ESkin_WingGeom_Struct0_0, MATERIAL=Aluminum_6061-T6, ORIENTATION=OSkin_WingGeom_Struct0_0
0.00833333

*ORIENTATION, NAME=OSkin_WingGeom_Struct0_0, SYSTEM=RECTANGULAR
-0.000000,1.000000,0.000000,0.0,0.0,1.0

*SHELL SECTION, ELSET=ESkin_WingGeom_Struct0_1, MATERIAL=Aluminum_6061-T6, ORIENTATION=OSkin_WingGeom_Struct0_1
0.00833333

*ORIENTATION, NAME=OSkin_WingGeom_Struct0_1, SYSTEM=RECTANGULAR
0.000000,0.000000,0.000000,0.0,0.0,1.0

*SHELL SECTION, ELSET=ERibArray0_WingGeom_Struct0_0, MATERIAL=Aluminum_6061-T6, ORIENTATION=ORibArray0_WingGeom_Struct0_0
0.00833333

*ORIENTATION, NAME=ORibArray0_WingGeom_Struct0_0, SYSTEM=RECTANGULAR
0.998859,0.000000,-0.047751,0.0,0.0,1.0

*SHELL SECTION, ELSET=ERibArray0_WingGeom_Struct0_1, MATERIAL=Aluminum_6061-T6, ORIENTATION=ORibArray0_WingGeom_Struct0_1
0.00833333

*ORIENTATION, NAME=ORibArray0_WingGeom_Struct0_1, SYSTEM=RECTANGULAR
0.998859,0.000000,-0.047751,0.0,0.0,1.0

*SHELL SECTION, ELSET=ERibArray0_WingGeom_Struct0_2, MATERIAL=Aluminum_6061-T6, ORIENTATION=ORibArray0_WingGeom_Struct0_2
0.00833333

*ORIENTATION, NAME=ORibArray0_WingGeom_Struct0_2, SYSTEM=RECTANGULAR
0.998859,0.000000,-0.047751,0.0,0.0,1.0

*SHELL SECTION, ELSET=ERibArray0_WingGeom_Struct0_3, MATERIAL=Aluminum_6061-T6, ORIENTATION=ORibArray0_WingGeom_Struct0_3
0.00833333

*ORIENTATION, NAME=ORibArray0_WingGeom_Struct0_3, SYSTEM=RECTANGULAR
0.998859,0.000000,-0.047751,0.0,0.0,1.0

*SHELL SECTION, ELSET=ERibArray0_WingGeom_Struct0_4, MATERIAL=Aluminum_6061-T6, ORIENTATION=ORibArray0_WingGeom_Struct0_4
0.00833333

*ORIENTATION, NAME=ORibArray0_WingGeom_Struct0_4, SYSTEM=RECTANGULAR
0.998859,0.000000,-0.047751,0.0,0.0,1.0

*SHELL SECTION, ELSET=ERibArray0_WingGeom_Struct0_5, MATERIAL=Aluminum_6061-T6, ORIENTATION=ORibArray0_WingGeom_Struct0_5
0.00833333

*ORIENTATION, NAME=ORibArray0_WingGeom_Struct0_5, SYSTEM=RECTANGULAR
0.000000,0.000000,0.000000,0.0,0.0,1.0

*SHELL SECTION, ELSET=ERibArray0_WingGeom_Struct0_6, MATERIAL=Aluminum_6061-T6, ORIENTATION=ORibArray0_WingGeom_Struct0_6
0.00833333

*ORIENTATION, NAME=ORibArray0_WingGeom_Struct0_6, SYSTEM=RECTANGULAR
0.000000,0.000000,0.000000,0.0,0.0,1.0

*SHELL SECTION, ELSET=ERibArray0_WingGeom_Struct0_7, MATERIAL=Aluminum_6061-T6, ORIENTATION=ORibArray0_WingGeom_Struct0_7
0.00833333

*ORIENTATION, NAME=ORibArray0_WingGeom_Struct0_7, SYSTEM=RECTANGULAR
0.000000,0.000000,0.000000,0.0,0.0,1.0

*SHELL SECTION, ELSET=ERibArray0_WingGeom_Struct0_8, MATERIAL=Aluminum_6061-T6, ORIENTATION=ORibArray0_WingGeom_Struct0_8
0.00833333

*ORIENTATION, NAME=ORibArray0_WingGeom_Struct0_8, SYSTEM=RECTANGULAR
0.000000,0.000000,0.000000,0.0,0.0,1.0

*SHELL SECTION, ELSET=ERibArray0_WingGeom_Struct0_9, MATERIAL=Aluminum_6061-T6, ORIENTATION=ORibArray0_WingGeom_Struct0_9
0.00833333

*ORIENTATION, NAME=ORibArray0_WingGeom_Struct0_9, SYSTEM=RECTANGULAR
0.000000,0.000000,0.000000,0.0,0.0,1.0

*SHELL SECTION, ELSET=ESpar1_WingGeom_Struct0_0, MATERIAL=Aluminum_6061-T6, ORIENTATION=OSpar1_WingGeom_Struct0_0
0.00833333

*ORIENTATION, NAME=OSpar1_WingGeom_Struct0_0, SYSTEM=RECTANGULAR
0.000000,1.000000,0.000000,0.0,0.0,1.0

*SHELL SECTION, ELSET=ESpar1_WingGeom_Struct0_1, MATERIAL=Aluminum_6061-T6, ORIENTATION=OSpar1_WingGeom_Struct0_1
0.00833333

*ORIENTATION, NAME=OSpar1_WingGeom_Struct0_1, SYSTEM=RECTANGULAR
0.000000,0.000000,0.000000,0.0,0.0,1.0


** Materials
*MATERIAL, NAME=Aluminum_6061-T6
*DENSITY
5.26338
*ELASTIC, TYPE=ISO
1.4256e+09, 0.33
*EXPANSION, TYPE=ISO
1.3e-05
