OpenVSP model (file version 5), 14 components.
Geometry view with OpenVSP parameter names; values to 6 digits, angles in degrees, lengths in the model's unit.
Overall bounding box: X_Min=-0.699723 X_Len=1.45891 Y_Min=-1.99315 Y_Len=3.9863 Z_Min=-0.2675 Z_Len=0.5675

Wing "WingGeom"
  location (X Y Z) 3.04586e-05 0 0.00174497, rotation 0 2 0
  symmetric about XZ
  bounding box size 0.205265 3.9863 0.182689
  totals: TotalSpan=4 TotalProjectedSpan=3.9863 TotalChord=0.2 TotalArea=0.8 TotalAR=19.8633
  root: chord 0.2, twist 2, NACA 4-series Camber=0.02 CamberLoc=0.4 ThickChord=0.12
  sections:
    n  Span  Root_Chord  Tip_Chord  Area  Sweep  Sweep_Location  Dihedral  Twist  Twist_Location  tip airfoil
    1  1     0.2         0.2        0.2   0      0               3         0      0.25            as above
    2  1     0.2         0.2        0.2   0      0               6         0      0.25            as above
  structure "WingGeom_Struct0": Skin, Rib0, Rib1, Rib2, Rib3, Rib4, Rib5

Wing "WingGeom"
  location (X Y Z) -0.7 0.8 0.04, rotation 0 0 0
  symmetric about XZ
  bounding box size 0.148884 2.3989 0.0464198
  totals: TotalSpan=0.8 TotalProjectedSpan=0.798904 TotalChord=0.15 TotalArea=0.12 TotalAR=5.31873
  root: chord 0.15, twist 7, NACA 4-series Camber=0.02 CamberLoc=0.4 ThickChord=0.12
  sections:
    n  Span  Root_Chord  Tip_Chord  Area  Sweep  Sweep_Location  Dihedral  Twist  Twist_Location  tip airfoil
    1  0.4   0.15        0.15       0.06  0      0               3         7      0.25            as above

Wing "WingGeom"
  location (X Y Z) 0.55 0 0, rotation 90 0 0
  bounding box size 0.209191 0.0240109 0.3
  totals: TotalSpan=0.3 TotalProjectedSpan=0.3 TotalChord=0.15 TotalArea=0.045 TotalAR=2
  root: chord 0.2, twist 0, NACA 4-series Camber=0 CamberLoc=0.4 ThickChord=0.12
  sections:
    n  Span  Root_Chord  Tip_Chord  Area   Sweep  Sweep_Location  Dihedral  Twist  Twist_Location  tip airfoil
    1  0.3   0.2         0.1        0.045  20     0               0         0      0.25            as above

Wing "WingGeom"
  location (X Y Z) -0.7 0 0, rotation 0 0 0
  symmetric about XZ
  bounding box size 0.148884 0.4 0.0254854
  totals: TotalSpan=0.4 TotalProjectedSpan=0.4 TotalChord=0.15 TotalArea=0.06 TotalAR=2.66667
  root: chord 0.15, twist 7, NACA 4-series Camber=0.02 CamberLoc=0.4 ThickChord=0.12
  sections:
    n  Span  Root_Chord  Tip_Chord  Area  Sweep  Sweep_Location  Dihedral  Twist  Twist_Location  tip airfoil
    1  0.2   0.15        0.15       0.03  0      0               0         7      0.25            as above

Fuselage "FuselageGeom"
  location (X Y Z) 0 0.1 0.03, rotation 0 0 -90
  bounding box size 0.615 0.2 0.13
  Design: Length=0.2
  cross sections:
    n  XLocPercent  YLocPercent  ZLocPercent  shape
    0  0            0            -0.15        edit curve Width=1 Height=1 AbsoluteFlag=0 SymType=0 linear points (X Y): 0.315 0.075, 0.215 -0.03, 0.135 -0.03, 0.025 -0.03, -0.2 0.05, -0.3 0.075, -0.2 0.1, 0.215 0.1, 0.315 0.075
    1  1            0            -0.15        as above

Fuselage "FuselageGeom"
  location (X Y Z) 0 1.1 0.08, rotation 5 0 -90
  symmetric about XZ
  bounding box size 0.615 2.20872 0.146936
  Design: Length=0.2
  cross sections:
    n  XLocPercent  YLocPercent  ZLocPercent  shape
    0  0            0            -0.1         edit curve Width=1 Height=1 AbsoluteFlag=1 SymType=0 linear points (X Y): 0.315 0.075, 0.215 -0.03, 0.135 -0.03, 0.025 -0.03, -0.2 0.05, -0.3 0.075, -0.2 0.1, 0.215 0.1, 0.315 0.075
    1  1            0            -0.1         as above

Stack "StackGeom"
  location (X Y Z) -0.45 0 -0.23, rotation 0 0 90
  symmetric about XZ
  bounding box size 0.075 0.04 0.075
  cross sections:
    n  XDelta  YDelta  ZDelta  shape
    0  0       0       0       circle Circle_Diameter=0.075
    1  0.02    0       0       as above

Stack "StackGeom"
  location (X Y Z) 0 0 -0.2, rotation 0 0 90
  symmetric about XZ
  bounding box size 0.075 0.04 0.075
  cross sections:
    n  XDelta  YDelta  ZDelta  shape
    0  0       0       0       circle Circle_Diameter=0.075
    1  0.02    0       0       as above

Stack "StackGeom"
  location (X Y Z) 0 1 -0.14, rotation 5 0 90
  symmetric about XZ
  bounding box size 0.075 2.08623 0.0782008
  cross sections:
    n  XDelta  YDelta  ZDelta  shape
    0  0       0       0       circle Circle_Diameter=0.075
    1  0.04    0       0       as above

Stack "StackGeom"
  location (X Y Z) -0.45 1 -0.2, rotation 5 0 90
  symmetric about XZ
  bounding box size 0.075 2.08623 0.0782008
  cross sections:
    n  XDelta  YDelta  ZDelta  shape
    0  0       0       0       circle Circle_Diameter=0.075
    1  0.04    0       0       as above

Stack "StackGeom"
  location (X Y Z) -0.45 0 -0.1, rotation 90 90 0
  symmetric about XZ
  bounding box size 0.1 0.02 0.15
  cross sections:
    n  XDelta  YDelta  ZDelta  shape
    0  0       0       0       edit curve Width=0.15 Height=0.1 AbsoluteFlag=0 SymType=0 linear points (X Y): 0.5 0, 0.5 -0.5, 0 -0.2, -0.5 -0.2, -0.5 0, -0.5 0.2, 0 0.2, 0.5 0.5, 0.5 0
    1  0.01    0       0       as above

Stack "StackGeom"
  location (X Y Z) 0 0 -0.07, rotation 90 90 0
  symmetric about XZ
  bounding box size 0.1 0.02 0.15
  cross sections:
    n  XDelta  YDelta  ZDelta  shape
    0  0       0       0       edit curve Width=0.15 Height=0.1 AbsoluteFlag=0 SymType=0 linear points (X Y): 0.5 0, 0.5 -0.5, 0 -0.2, -0.5 -0.2, -0.5 0, -0.5 0.2, 0 0.2, 0.5 0.5, 0.5 0
    1  0.01    0       0       as above

Stack "StackGeom"
  location (X Y Z) 0 1 -0.01, rotation 95 90 0
  symmetric about XZ
  bounding box size 0.1 2.05292 0.151172
  cross sections:
    n  XDelta  YDelta  ZDelta  shape
    0  0       0       0       edit curve Width=0.15 Height=0.1 AbsoluteFlag=0 SymType=0 linear points (X Y): 0.5 0, 0.5 -0.5, 0 -0.2, -0.5 -0.2, -0.5 0, -0.5 0.2, 0 0.2, 0.5 0.5, 0.5 0
    1  0.02    0       0       as above

Stack "StackGeom"
  location (X Y Z) -0.45 1 -0.07, rotation 95 90 0
  symmetric about XZ
  bounding box size 0.1 2.05292 0.151172
  cross sections:
    n  XDelta  YDelta  ZDelta  shape
    0  0       0       0       edit curve Width=0.15 Height=0.1 AbsoluteFlag=0 SymType=0 linear points (X Y): 0.5 0, 0.5 -0.5, 0 -0.2, -0.5 -0.2, -0.5 0, -0.5 0.2, 0 0.2, 0.5 0.5, 0.5 0
    1  0.02    0       0       as above

VSPAERO settings: Sref=0.8 bref=4 cref=0.2 Xcg=-0.07 Ycg=0 Zcg=0 AlphaStart=-10 AlphaEnd=10 AlphaNpts=10 BetaStart=0 BetaEnd=0 BetaNpts=1 MachStart=0 MachEnd=0 MachNpts=1 ReCref=1e+07 Vinf=100 Rho=0.002377
