OpenVSP model (file version 5), 3 components.
Geometry view with OpenVSP parameter names; values to 6 digits, angles in degrees, lengths in the model's unit.
Overall bounding box: X_Min=-0.000137954 X_Len=3.99466 Y_Min=-11.0006 Y_Len=22.0012 Z_Min=-0.280515 Z_Len=0.430221

Wing "WingGeom"
  location (X Y Z) 0 0 0, rotation 0 3 0
  symmetric about XZ
  bounding box size 3.99466 22.0012 0.430221
  totals: TotalSpan=20 TotalProjectedSpan=20 TotalChord=4 TotalArea=80 TotalAR=5
  root: chord 4, twist 0, NACA 4-series Camber=0 CamberLoc=0.2 ThickChord=0.1
  sections:
    n  Span  Root_Chord  Tip_Chord  Area  Sweep  Sweep_Location  Dihedral  Twist  Twist_Location  tip airfoil
    1  2     4           4          8     0      0               0         0      0.25            as above
    2  2     4           4          8     0      0               0         0      0.25            as above
    3  2     4           4          8     0      0               0         0      0.25            as above
    4  2     4           4          8     0      0               0         0      0.25            as above
    5  2     4           4          8     0      0               0         0      0.25            as above

Mesh "MeshGeom"
  location (X Y Z) 0 0 0, rotation 0 0 0
  triangle mesh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

Mesh "MeshGeom", child of "MeshGeom"
  location (X Y Z) 0 0 0, rotation 0 0 0
  triangle mesh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
