OpenVSP model (file version 5), 3 components.
Geometry view with OpenVSP parameter names; values to 6 digits, angles in degrees, lengths in the model's unit.
Overall bounding box: X_Min=0 X_Len=15.2827 Y_Min=-4.03039 Y_Len=8.06077 Z_Min=-0.56 Z_Len=2.68261

Fuselage "FuselageGeom"
  location (X Y Z) 0 0 0, rotation 0 0 0
  bounding box size 14.4 1.12 1.12
  mass: Density=1 Shell_Flag=1 Mass_Area=2 Mass_Prior=0
  Design: Length=14.4
  cross sections:
    n  XLocPercent  YLocPercent  ZLocPercent  shape
    0  0            0            0            point
    1  0.477611     0            0            circle Circle_Diameter=1.12
    2  0.836957     0            0            as above
    3  1            0            0.025        circle Circle_Diameter=0.2

Wing "WingGeom"
  location (X Y Z) 11.4565 0 0.342609, rotation 90 0 0
  bounding box size 3.82614 0.248144 1.78
  mass: Density=1 Shell_Flag=1 Mass_Area=1 Mass_Prior=0
  totals: TotalSpan=1.78 TotalProjectedSpan=1.78 TotalChord=1.58 TotalArea=2.8124 TotalAR=1.12658
  root: chord 2.48, twist 0, NACA 4-series Camber=0 CamberLoc=0.2 ThickChord=0.1
  sections:
    n  Span  Root_Chord  Tip_Chord  Area    Sweep  Sweep_Location  Dihedral  Twist  Twist_Location  tip airfoil
    1  1.78  2.48        0.68       2.8124  60.5   0               0         0      0.25            as above

Wing "WingGeom"
  location (X Y Z) 6.47391 0.11 -0.4, rotation 0 0 0
  symmetric about XZ
  bounding box size 6.61056 8.06077 0.381654
  mass: Density=1 Shell_Flag=1 Mass_Area=16 Mass_Prior=0
  totals: TotalSpan=7.77684 TotalProjectedSpan=7.77684 TotalChord=3.0261 TotalArea=22.8401 TotalAR=2.64794
  root: chord 5.2244, twist -0.592, airfoil file "foil_No1.dat"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 BaseThickChord=0.0700036 ThickChord=0.0700036
  sections:
    n  Span     Root_Chord  Tip_Chord  Area     Sweep  Sweep_Location  Dihedral  Twist    Twist_Location  tip airfoil
    1  1.76842  5.2244      2.80001    7.09527  58     0               0         -2.1114  0.25            airfoil file "foil_No2.dat"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 BaseThickChord=0.0700081 ThickChord=0.0700081
    2  2.12     2.80001     1.28       4.32481  49.7   0               0         -3.1789  0.25            airfoil file "foil_No3.dat"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 BaseThickChord=0.0700047 ThickChord=0.0700047
  SS_Control "SS_CONT_0": UStart=0.5 UEnd=0.733333 Length_C_Start=0.45 Length_C_End=0.45 Length_Start=1.26 Length_End=0.621588 LE_Flag=0 Surf_Type=2

VSPAERO settings: Sref=22.8401 bref=7.77684 cref=3.0261 Xcg=3.43823 Ycg=0 Zcg=0.286248 AlphaStart=0 AlphaEnd=10 AlphaNpts=5 BetaStart=0 BetaEnd=0 BetaNpts=1 MachStart=0 MachEnd=0 MachNpts=1 ReCref=1e+07 Vinf=80 Rho=1.225
  control group "elevator": DeflectionAngle=0
  control group "ailron": DeflectionAngle=0
